<Lems
      xmlns="http://www.neuroml.org/lems/0.7.4"
      xmlns:xsi="http://www.w3.org/2001/XMLSchema-instance"
      xsi:schemaLocation="http://www.neuroml.org/lems/0.7.4 ../../LEMS/Schemas/LEMS/LEMS_v0.7.4.xsd"
      description="A number of ComponentTypes for rate based/population models.
                    Base type of any cell/population which has a (dimensionless) rate _R.
                    Generic nonlinear 2-D (phase plane) oscillator.">

    <ComponentType name="Oscillator"
                   description="Rate based 2D oscillator for TVB"
                   value="">

        <Constant name="tau" domain="lo=1.0, hi=5.0, step=0.01" default="1.0"
                  description="A time-scale hierarchy can be introduced for the state variables :math:`V` and :math:`W`. Default parameter is 1, which means no time-scale hierarchy."/>
        <Constant name="I" domain="lo=-5.0, hi=5.0, step=0.01" default="0.0" description="Baseline shift of the cubic nullcline"/>
        <Constant name="a" domain="lo=-5.0, hi=5.0, step=0.01" default="-2.0" description="Vertical shift of the configurable nullcline"/>
        <Constant name="b" domain="lo=-20.0, hi=15.0, step=0.01" default="-10.0" description="Linear slope of the configurable nullcline"/>
        <Constant name="c" domain="lo=-10.0, hi=10.0, step=0.01" default="0" description="Parabolic term of the configurable nullcline"/>
        <Constant name="d" domain="lo=0.0001, hi=1.0, step=0.0001" default="0.02" description="Temporal scale factor. Warning: do not use it unless you know what you are doing and know about time tides."/>
        <Constant name="e" domain="lo=-5.0, hi=5.0, step=0.0001" default="3.0" description="Coefficient of the quadratic term of the cubic nullcline."/>
        <Constant name="f" domain="lo=-5.0, hi=5.0, step=0.0001" default="1.0" description="Coefficient of the cubic term of the cubic nullcline."/>
        <Constant name="g" domain="lo=-5.0, hi=5.0, step=0.5" default="0.0" description="Coefficient of the linear term of the cubic nullcline."/>
        <Constant name="alpha" domain="lo=-5.0, hi=5.0, step=0.0001" default="1.0" description="Constant parameter to scale the rate of feedback from the slow variable to the fast variable."/>
        <Constant name="beta" domain="lo=-5.0, hi=5.0, step=0.0001" default="1.0" description="Constant parameter to scale the rate of feedback from the slow variable to itself"/>
        <Constant name="gamma" domain="lo=-1.0, hi=1.0, step=0.1" default="1.0" description="Constant parameter to reproduce FHN dynamics where excitatory input currents are negative.
It scales both I and the long range coupling term.."/>

        <!-- Parameters will be assumed to be swept. sweep data will be matched by order of entry -->
        <Parameter name="global_coupling" dimension="float" />
        <Parameter name="global_speed" dimension="float" />

        <Dynamics>
            <StateVariable name="V" default="-2.0, 4.0" boundaries=""/>
            <StateVariable name="W" default="-6.0, 6.0" boundaries=""/>

            <!-- Always use nsig for noise  />-->
            <DerivedVariable name="nsig" expression="sqrt(dt) * sqrt(2.0 * 1e-3)"/>
            <DerivedVariable name="rec_speed_dt" expression="1.0f / global_speed / (dt)"/>
            <DerivedVariable name="lc_0" expression="0.0"/>

            <TimeDerivative name="dV" expression="d * tau * (alpha * W - f * powf(V, 3) + e * powf(V, 2) + g * V + gamma * I + gamma * c_0 + lc_0 * V)"/>
            <TimeDerivative name="dW" expression="d * (a + b * V + c * powf(V, 2) - beta * W) / tau"/>
        </Dynamics>

        <!-- Exposures are used for observables, for the name enter variable to be observed (usually states)
        and for dimension enter the reduction functionality-->
        <Exposure name="V" choices="V, W, V + W, V - W" default="V"/>
        <Exposure name="W" choices="V * W, V / W" default="V"/>

    </ComponentType>

    <ComponentType name="coupling_function">

<!--        Added function for pre and post synaptic activity. Fixed the power being **, however no parse checks for it-->

        <Constant name="a" domain="lo=0.0, hi=10., step=0.1" default="0.1" description="Rescales the connection strength."/>

<!--        variables for pre synaptic function-->
        <Parameter name="V" dimension=''/>
        <Parameter name="V_j" dimension=''/>

<!--        variables for post synaptic function-->
<!--        <Requirement name="wij" dimension=''/>-->
        <Dynamics>
            <DerivedVariable name="pre" expression="sin(V_j - V)" description = "pre synaptic function for coupling activity"/>
            <DerivedVariable name="post" expression="a" description = "post synaptic function for coupling activity"/>
        </Dynamics>

        <!-- Handle local coupling result, full expression is c_0 *= 'value'. Name option is hardcoded -->
        <DerivedParameter name="c_0" value="global_coupling * global_speed"/>

    </ComponentType>

    <ComponentType name="noise" description="on">

    </ComponentType>

</Lems>

<!--Look at vector representation in XML LEMS-->
