<Lems
      xmlns="http://www.neuroml.org/lems/0.7.4"
      xmlns:xsi="http://www.w3.org/2001/XMLSchema-instance"
      xsi:schemaLocation="http://www.neuroml.org/lems/0.7.4 ../../LEMS/Schemas/LEMS/LEMS_v0.7.4.xsd"
      description="A number of ComponentTypes for rate based/population models">

    <ComponentType name="Kuramoto"
                   description="Base type of any cell/population which has a (dimensionless) rate _R."
                   value="none">

        <Constant name="omega" domain="lo=0.01, hi=200.0, step=0.1" default="1.0" description="sets the base line frequency for the Kuramoto oscillator in [rad/ms]"/>

        <!-- Parameters will be assumed to be swept. sweep data will be matched by order of entry -->
        <Parameter name="global_coupling" dimension='float'/>
        <Parameter name="global_speed" dimension='float'/>

<!--        <Requirement name="MODEL_LIMIT" dimension="2_pi"/> &lt;!&ndash; put helping functions in util, select wrapping functions.  &ndash;&gt;-->

        <Exposure name="V" default="sin(V)" choices=""/>

        <Dynamics>
            <!-- Use PI to select the PI wrapper (ie Kuramoto) -->
            <StateVariable name="V" default="-2, 1" boundaries="PI"/>

            <DerivedVariable name="rec_n" expression="1.0f / n_node" />
            <DerivedVariable name="rec_speed_dt" expression="1.0f / global_speed / (dt)" />
            <DerivedVariable name="omega" expression="60.0 * 2.0 * M_PI_F / 1e3" />
            <DerivedVariable name="nsig" expression="sqrt(dt) * sqrt(2.0 * 1e-5)" />

            <TimeDerivative name="dV" expression="omega * c_0"/>
        </Dynamics>

    </ComponentType>

    <ComponentType name="coupling_function">

        <Constant name="a" dimension="lo=0.0, hi=10., step=0.1" default="0.1" description="Rescales the connection strength."/>

<!--        variables for pre synaptic function-->
        <Parameter name="V" dimension=''/>
        <Parameter name="V_j" dimension=''/>

<!--        variables for post synaptic function-->
<!--        <Requirement name="wij" dimension=''/>-->
        <Dynamics>
            <DerivedVariable name="pre" value="sin(V_j - V)" description = "pre synaptic function for coupling activity"/>
            <DerivedVariable name="post" value="a" description = "post synaptic function for coupling activity"/>
        </Dynamics>

        <!-- Handle local coupling result, full expression is c_0 *= 'value'. Name option is hardcoded -->
        <DerivedParameter name="c_0" value="global_coupling * rec_n"/>

    </ComponentType>

    <!-- If noise needs to be present, just specify the component type. Detail might be added later -->
    <ComponentType name="noise" description="on">
    </ComponentType>

</Lems>
